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/batch
! ANSYS input file written by Workbench version 2022 R1
! File used for geometry attach: C:\Users\rizvansky\Desktop\Anton_stuff\MaM\HW5\Forces_analysis_files\dp0\SYS\DM\SYS.scdoc
/title,Forces_analysis--Static Structural (A5)
/com,--- Data in consistent MKS units. See Solving Units in the help system for more information.
/units,MKS
/prep7
! Turn off shape checking because checks already performed inside WB mesher.
! See help system for more information.
SHPP,OFF,,NOWARN
etcon,set             ! allow ANSYS to choose best KEYOP's for 180x elements, resets any applicable keyopt to MAPDL defaults
/com,*********** Nodes for the whole assembly ***********
nblock,3,,4301
(1i9,3e20.9e3)
        1    -3.800000000E-02     5.250000000E-02     1.500000000E-02
        2    -3.800000000E-02     5.250000000E-02    -1.500000000E-02
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-1
/com,*********** Nodes for all Remote Points ***********
nblock,3
(1i9,3e20.9e3)
     3911     1.960724340E-19     0.000000000E+00    -1.960724340E-19
     3912     1.960724340E-19     0.000000000E+00    -1.960724340E-19
     3913     0.000000000E+00     7.200000000E-02     4.650000000E-01
     3914    -1.337427330E-10     6.000000080E-02     0.000000000E+00
     3915     1.978419226E-10     6.000000009E-02    -3.500000015E-02
     3916     1.978419226E-10     6.000000009E-02    -3.500000015E-02
-1
/com,*********** Elements for Body 1 "Detail\Body1" ***********
et,1,187
eblock,19,solid,,746
(19i9)
        1        1        1        1        0        0        0        0       10        0        1      147      238      231      270     1173     1470     1172     1174
     1495     1473
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-1
/com,*********** Elements for Body 2 "Rod\Body1" ***********
et,2,186
keyo,2,2,1          ! set full integration on SOLID186
eblock,19,solid,,440
(19i9)
        2        2        2        2        0        0        0        0       20        0      747     1549     1552     1556     1555     1868     1865     1861     1862
     2206     2219     2232     2207     3238     3229     3227     3232     2209     2221     2237     2234
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-1
/com,*********** Send User Defined Coordinate System(s) ***********
local,12,0,1.96072434027467e-019,0.,-1.96072434027467e-019,0.,90.,0.
local,13,0,1.97841922611579e-010,6.00000000946664e-002,-3.50000001490116e-002,-180.,0.,-180.
csys,0
toffst,273.15,  ! Temperature offset from absolute zero
/com,*********** Set Reference Temperature ***********
tref,22.
/com,*********** Send Materials ***********
Temperature = 'TEMP' ! Temperature
MP,DENS,1,2770,	! kg m^-3
MP,ALPX,1,2.3e-05,	! C^-1
MP,C,1,875,	! J kg^-1 C^-1
MPTEMP,,,,,,,,
MPTEMP,1,-100
MPTEMP,2,0
MPTEMP,3,100
MPTEMP,4,200
MPDATA,KXX,1, ,114,144,165,175,	! W m^-1 C^-1
MPTEMP,,,,,,,,
MPTEMP,,,,,,,,
MPTEMP,1,0
MPTEMP,2,20
MPTEMP,3,100
MPDATA,RSVX,1, ,2.43e-08,2.67e-08,3.63e-08,	! kg m^3 A^-2 s^-3
MPTEMP,,,,,,,,
MP,EX,1,71000000000,	! Pa
MP,NUXY,1,0.33,
MP,MURX,1,1,

Temperature = 'TEMP' ! Temperature
MP,DENS,2,7850,	! kg m^-3
MP,ALPX,2,1.2e-05,	! C^-1
MP,C,2,434,	! J kg^-1 C^-1
MP,KXX,2,60.5,	! W m^-1 C^-1
MP,RSVX,2,1.7e-07,	! kg m^3 A^-2 s^-3
MP,EX,2,200000000000,	! Pa
MP,NUXY,2,0.3,
MP,MURX,2,10000,

!************************* Model Summary ********************
!Detail\Body1,	Aluminum Alloy,	matid,	1
!Rod\Body1,	Structural Steel,	matid,	2
!************************* End Model Summary ********************
/com,*********** Create Remote Point "Internal Remote Point 2" ***********
! -------- Remote Point Used by "Fixed - Ground To Detail\Body1" --------
*set,tid,4
*set,cid,3
et,cid,174
et,tid,170
keyo,tid,2,1               ! Don't fix the pilot node
keyo,tid,4,111111
keyo,cid,12,5              ! Bonded Contact
keyo,cid,4,2               ! Rigid CERIG style load
keyo,cid,2,2               ! MPC style contact
eblock,10,,,50
(15i9)
     2057        3        3        3        0       16       17      217      217      392      405      217      397
     2058        3        3        3        0       16      217      218      218      397     1420      218      398
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-1
*set,_npilot,3912
_npilot40=_npilot
type,tid
mat ,cid
real,cid
tshape,pilo
en,2107,_npilot
tshape
csys,12
nrot,3912
csys,0
/com,*********** Create Remote Point "Internal Remote Point 3" ***********
! -------- Remote Point Used by "Remote Force" --------
*set,tid,6
*set,cid,5
et,cid,174
et,tid,170
keyo,tid,2,1               ! Don't fix the pilot node
keyo,tid,4,111111
keyo,cid,12,5              ! Bonded Contact
keyo,cid,4,1               ! Deformable RBE3 style load
keyo,cid,2,2               ! MPC style contact
eblock,10,,,320
(15i9)
     2108        5        5        5        0     2151     2204     2160     2158     3851     3868     3864     3850
     2109        5        5        5        0     1877     1883     2166     1885     3264     3277     3281     3265
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-1
*set,_npilot,3913
_npilot49=_npilot
type,tid
mat ,cid
real,cid
tshape,pilo
en,2428,_npilot
tshape
/com,*********** Create Remote Point "Internal Remote Point 5" ***********
! -------- Remote Point Used by "Fixed - Detail\Body1 To Rod\Body1" --------
*set,tid,8
*set,cid,7
et,cid,174
et,tid,170
keyo,tid,2,1               ! Don't fix the pilot node
keyo,tid,4,111111
keyo,cid,12,5              ! Bonded Contact
keyo,cid,4,2               ! Rigid CERIG style load
keyo,cid,2,2               ! MPC style contact
eblock,10,,,18
(15i9)
     2429        7        7        7        0      130      140      141      141     1113     1141      141     1114
     2430        7        7        7        0      125      126      137      137     1090     1094      137     1092
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-1
*set,_npilot,3915
_npilot62=_npilot
type,tid
mat ,cid
real,cid
tshape,pilo
en,2447,_npilot
tshape
csys,13
nrot,3915
csys,0
/com,*********** Create Remote Point "Internal Remote Point 6" ***********
! -------- Remote Point Used by "Fixed - Detail\Body1 To Rod\Body1" --------
*set,tid,10
*set,cid,9
et,cid,174
et,tid,170
keyo,tid,2,1               ! Don't fix the pilot node
keyo,tid,4,111111
keyo,cid,12,5              ! Bonded Contact
keyo,cid,4,2               ! Rigid CERIG style load
keyo,cid,2,2               ! MPC style contact
eblock,10,,,11
(15i9)
     2448        9        9        9        0     1865     1861     1862     1868     3229     3227     3232     3238
     2449        9        9        9        0     2159     1868     1862     2160     3244     3232     3233     3866
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-1
*set,_npilot,3916
_npilot63=_npilot
type,tid
mat ,cid
real,cid
tshape,pilo
en,2459,_npilot
tshape
csys,13
nrot,3916
csys,0
/com,*********** Create Joint "Fixed - Ground To Detail\Body1" ***********
! Joint Element Type Declaration and Definition using MPC184
*set,_jid,11
et,_jid,184
keyo,_jid,1,13          ! Fixed Joint
sectype,_jid, joint, weld, _wbjoint
secjoint,,12,12
mat,_jid
real,_jid
type,_jid
secnum,_jid
en,2049,,3912        ! body to ground joint
/com,*********** Create Joint "Fixed - Detail\Body1 To Rod\Body1" ***********
! Joint Element Type Declaration and Definition using MPC184
*set,_jid,12
et,_jid,184
keyo,_jid,1,13          ! Fixed Joint
sectype,_jid, joint, weld, _wbjoint
secjoint,,13,13
mat,_jid
real,_jid
type,_jid
secnum,_jid
en,2056,3915,3916      ! body to body joint
/com,*********** Construct Remote Force ***********
fini
/com,****************************************************************************
/com,*************************    SOLUTION       ********************************
/com,****************************************************************************
/solu
antype,0                   ! static analysis
_thickRatio=0.5     ! Ratio of thick parts in the model
eqsl,sparse,,,,,1
cntr,print,1               ! print out contact info and also make no initial contact an error
dmpoption,emat,no             ! Don't combine emat file for DANSYS
dmpoption,esav,no             ! Don't combine esav file for DANSYS
nldiag,cont,iter           ! print out contact info each equilibrium iteration
rescontrol,,none                 ! Do not keep any restart files
/com,****************************************************
/com,******************* SOLVE FOR LS 1 OF 1 ****************
nsel,s,node,,3913
f,all,fx,0.
f,all,fy,-1000.
f,all,fz,0.
nsel,all
nsub,1,1,1
time,1.
outres,erase
outres,all,none
outres,nsol,all,
outres,rsol,all
outres,eangl,all
outres,etmp,all
outres,veng,all
outres,strs,all,
outres,epel,all,
outres,eppl,all,
outres,cont,all,
esel,s,type,,11
esel,a,type,,12
cm,_elmisc,elem
esel,all
outres,misc,all,_elmisc
! *********** WB SOLVE COMMAND ***********
! check interactive state
*get,ANSINTER_,active,,int
*if,ANSINTER_,ne,0,then
/eof
*endif
solve
/com *************** Write FE CONNECTORS *********
CEWRITE,file,ce,,INTE
/com,****************************************************
/com,*************** FINISHED SOLVE FOR LS 1 *************
/post1
fini
